<?xml version="1.0" encoding="UTF-8"?>
<channelml xmlns="http://morphml.org/channelml/schema" xmlns:xsi="http://www.w3.org/2001/XMLSchema-instance" xmlns:meta="http://morphml.org/metadata/schema" xsi:schemaLocation="http://morphml.org/channelml/schema     ../../Schemata/v1.8.0/Level2/ChannelML_v1.8.0.xsd" units="SI Units">

    <meta:notes>NeuroML file containing a single Channel description</meta:notes>

    <channel_type name="LeakConductance_pyr" density="yes">

        <status value="stable"/>

        <meta:notes>Passive conductance for pyramidal cell</meta:notes>

        <current_voltage_relation cond_law="ohmic" ion="non_specific" default_erev="-0.066" default_gmax="0.7042"/>

    </channel_type>

</channelml>
